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/batch
! ANSYS input file written by Workbench version 2025 R1
! File used for geometry attach: C:\Users\alexa\Documents\Ansys projects\fine_mesh_files\dp0\global\MECH\SYS-10\AssembledModel\SYS-10.pmdb
/title,fine_mesh--Static Structural (I4)
/COM,/COM,     ANSYSMotion, 2025.1
/com,--- Data in consistent NMM units. See Solving Units in the help system for more information.
/units,MPA
/prep7
! Turn off shape checking because checks already performed inside WB mesher.
! See help system for more information.
SHPP,OFF,,NOWARN
etcon,set             ! allow ANSYS to choose best KEYOP's for 180x elements, resets any applicable keyopt to MAPDL defaults
/com,*********** Nodes for the whole assembly ***********
nblock,3,,23929
(1i9,3e20.9e3)
        1     0.000000000E+00     0.000000000E+00     0.000000000E+00
        2     2.000000000E+03     0.000000000E+00     0.000000000E+00
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-1
/com,*********** Elements for Body 1 'Surface Body 1(External Model)' ***********
et,1,281
keyo,1,1,0          ! bending and membrane stiffness
eblock,19,solid,,10696
(19i9)
        1        1        1        1        0        0        0        0        8        0      368     3981     3983      828      828     5892     5893      828     5894
        1        1        1        1        0        0        0        0        8        0      369     4171     4341     3718     3718     5895     5896     3718     5897
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-1
/com,*********** Send User Defined Coordinate System(s) ***********
csys,0
toffst,273.15,      ! Temperature offset from absolute zero
/com,*********** Set Reference Temperature ***********
tref,22.
/com,*********** Send Materials ***********
Temperature = 'TEMP' ! Temperature
MP,DENS,1,7.85e-09,	! tonne mm^-3
MP,ALPX,1,1.2e-05,	! C^-1
MP,C,1,434000000,	! mm^2 s^-2 C^-1
MP,KXX,1,60.5,	! tonne mm s^-3 C^-1
MP,RSVX,1,0.00017,	! ohm mm
MP,EX,1,200000,	! tonne s^-2 mm^-1
MP,NUXY,1,0.3,
MP,MURX,1,10000,

/com,*********** Send Sheet Properties ***********
sectype,1,shell
secdata,10.
secoff,mid

!************************* Model Summary ********************
!Surface Body 1(External Model),	Structural Steel,	matid,	1
!************************* End Model Summary ********************
CMBLOCK,SURFACE8_EXTERNAL_MODEL_,ELEM,    10696
(8i10)
       368       369       370       371       372       373       374       375
       376       377       378       379       380       381       382       383
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
CMBLOCK,WALL_LEFT_EXTERNAL_MODEL_,NODE,       41
(8i10)
         1         4       211       212       213       214       215       216
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CMBLOCK,FREE_BOT_EXTERNAL_MODEL_,NODE,       85
(8i10)
         1         2         6         7         8         9        10        11
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CMBLOCK,FORCE_RIGHT_EXTERNAL_MODEL_,NODE,       41
(8i10)
         2         3        89        90        91        92        93        94
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CMBLOCK,FREE_TOP_EXTERNAL_MODEL_,NODE,       85
(8i10)
         3         4       128       129       130       131       132       133
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CMBLOCK,HOLE1_EXTERNAL_MODEL_,NODE,      476
(8i10)
         5       250       251       252       253       254       255       256
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/com,*********** Fixed Supports ***********
CMBLOCK,_FIXEDSU,NODE,       41
(8i10)
         1         4       211       212       213       214       215       216
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cmsel,s,_FIXEDSU
d,all,all
nsel,all
/com,*********** Define Force Using Surface Effect Elements ***********
local,12,0,0.,0.,0.,0.,0.,0.
csys,0
et,2,156
keyop,2,5,1         !  No orientation node
eblock,10,,,20
(15i9)
    11064        2        2        2       12        2       89      108
    11065        2        2        2       12       89       90      109
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-1
esel,s,type,,2
keyop,2,2,1         ! Apply load in local coordinate system
keyop,2,7,1         ! Use original area so load is constant in large deformation
esel,all
fini
/com,****************************************************************************
/com,*************************    SOLUTION       ********************************
/com,****************************************************************************
/solu
antype,0                   ! static analysis
_thickRatio=  0     ! Ratio of thick parts in the model
eqsl,sparse,,,,,1
cntr,print,1               ! print out contact info and also make no initial contact an error
dmpoption,emat,no             ! Don't combine emat file for DANSYS
dmpoption,esav,no             ! Don't combine esav file for DANSYS
nldiag,cont,iter           ! print out contact info each equilibrium iteration
rescontrol,,none                 ! Do not keep any restart files
/com,****************************************************
/com,******************* SOLVE FOR LS 1 OF 1 ****************
esel,s,type,,2
nsle
sfe,all,1,pres,1,500.
sfe,all,2,pres,1,0.
sfe,all,3,pres,1,0.
nsel,all
esel,all
nsub,1,1,1
time,1.
outres,erase
outres,all,none
outres,nsol,all,
outres,rsol,all
outres,eangl,all
outres,etmp,all
outres,veng,all
outres,strs,all,
outres,epel,all,
outres,eppl,all,
outres,cont,all,
! *********** WB SOLVE COMMAND ***********
! check interactive state
*get,ANSINTER_,active,,int
*if,ANSINTER_,ne,0,then
/eof
*endif
solve
/com *************** Write FE CONNECTORS *********
CEWRITE,file,ce,,INTE
/com,****************************************************
/com,*************** FINISHED SOLVE FOR LS 1 *************
*get,_NSOLTHREADS,active,0,ntfs
*get,_NSOLPROCESSES,active,0,npfs
/post1
fini
